# Known Parameters:
a := 2.873/4*in
b := 2.5 in
cc := 3.879 in
d := 2.769 in
ee := 1.732*2*in
alpha := 152.16 deg
W_2 := 0.1 lbf
W_3 := 0.6*lbf
W_4 := 0.01 lbf
Theta_2 := 210.1 deg
Theta_4 := 184 deg
# Supply initial guesses for unknowns:
Theta_1 := 23.05 deg
A_x := 2 lbf
A_y := 2 lbf
B_x := 2 lbf
B_y := 2 lbf
C_x := 2 lbf
C_y := 2 lbf
D_x := 2 lbf
D_y := 2 lbf
M_2 := 4 in*lbf
M_3 := 6*in*lbf
# From equations of equilibrium we have nine equations with nine unknowns:
Given
# From FBE of L_2, L_3, and L_4 as a system:
0 == M_2 + C_y*d*cos(Theta_1) - W_3*(d*cos(Theta_1) + cc*cos(Theta_4) + (ee*cos(alpha) + (-b*sin(alpha)))/2) - W_2*a/2*cos(Theta_2) - W_4*(d + cc*cos(Theta_4)/2)
ΣM_D := 0
0 == C_x + D_x
ΣF_x := 0
0 == C_y + D_y - W_2 - W_3 - W_4
ΣF_y := 0
# From FBE of L_3:
ΣM_A := 0
0 == -B_x*b*cos(alpha) + B_y*b*sin(alpha) - (-W_3*((ee*cos(alpha) + (-b*sin(alpha)))/2))
ΣF_x := 0
0 == A_x + B_x
ΣF_y := 0
0 == A_y + B_y - W_3
# From FBE of L_4:
0 == B_x*cc*sin(Theta_4) - B_y*cc*cos(Theta_4) - W_4*cc*cos(Theta_4)/2
ΣM_C := 0
0 == C_x - B_x
ΣF_x := 0
0 == C_y - B_y - W_4
ΣF_y := 0
[SA_x; SA_y; SB_x; SB_y; SC_x; SC_y; SD_x; SD_y; SM_2] := Find(A_x, A_y, B_x, B_y, C_x, C_y, D_x, D_y, M_2)
SA_x = -0.556219 lbf
SA_y = 0.566105 lbf
SB_x = 0.556219 lbf
SB_y = 0.0338946 lbf
SC_x = 0.556219 lbf
SC_y = 0.0438946 lbf
SD_x = -0.556219 lbf
SD_y = 0.666105 lbf
SM_2 = -2.19671 inch_pound
